// SBML level 3 version 2

model bioscrape_generated_model_693230()
  // model units - substance: mole, time: second, volume: litre, area: square_metre, length: metre, extent: mole

  // Compartments:
  compartment default = 1e-6;

  // Species:
  species U in default = 0;
  species X in default = 40;
  species Y in default = 40;
  species Zx in default = 10;
  species Zy in default = 10;

  // Parameters:
  noise = 0;
  q1 = 0.01;
  q2 = 0.01;

  // Reactions:
  r0: X + Y => X + U; q1*X*Y;
  r1: X + Y => Y + U; q2*X*Y;
  r2: X + U => 2 X; q1*X*U;
  r3: Y + U => 2 Y; q2*Y*U;
  r4: Y => U; noise*Y;
  r5: U => Y; noise*U;
  r6: X => U; noise*X;
  r7: U => X; noise*U;
  r8: Y => X; noise*Y;
  r9: X => Y; noise*X;
  r10: Y + Zx => U + Zx; q1*Y*Zx;
  r11: X + Zy => U + Zy; q2*X*Zy;
  r12: U + Zx => X + Zx; q1*U*Zx;
  r13: U + Zy => Y + Zy; q2*U*Zy;

  // Unit definitions:
  unit square_metre = metre^2;
end
